*Heading
** Job name: load_case_1_impulse_piezo_1 Model name: guw_model
** Generated by: Abaqus/CAE Learning Edition 2023
*Preprint, echo=NO, model=NO, history=NO, contact=NO
**
** PARTS
**
*Part, name=plate
*Node
      1,           0., 0.0153846154, 0.00300000003
      2, 0.0076923077, 0.0153846154, 0.00300000003
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*Element, type=C3D8R
1,  80,  82, 279, 276,   1,   2,  69,  73
2, 276, 279,  81, 277,  73,  69,   3,  72
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*Nset, nset=plate-material, generate
   1,  741,    1
*Elset, elset=plate-material, generate
   1,  428,    1
*Nset, nset=plate-field-output
   1,   2,   3,   4,   5,  11
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*Elset, elset=plate-field-output
   1,   2,   3,   4,   9,  10
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*Nset, nset=hole_01_bound_box
   2,   3,   4,   6,   7,   8
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*Elset, elset=hole_01_bound_box
 373, 374, 375, 376, 377, 378
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*Nset, nset=transducer_01_bound_box
  24,  25,  26,  27,  28,  35
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*Elset, elset=transducer_01_bound_box, generate
 403,  418,    1
*Nset, nset=transducer_01
 68,
*Nset, nset=plate-top-surface
   1,   2,   3,   4,   5,  11
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*Elset, elset=plate-top-surface
   1,   2,   3,   4,   9,  10
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*Nset, nset=transducer_02_bound_box
  19,  20,  21,  22,  23,  37
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*Elset, elset=transducer_02_bound_box, generate
 357,  372,    1
*Nset, nset=plate
   1,   2,   3,   4,   5,   6
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*Elset, elset=plate, generate
   1,  356,    1
*Nset, nset=transducer_02
 59,
** Region: (plate-material_continuum_section_homogenous_AluminumAlloy1100:plate-material)
*Elset, elset=_I1, internal, generate
   1,  428,    1
** Section: plate-material_continuum_section_homogenous_AluminumAlloy1100
*Solid Section, elset=_I1, material=AluminumAlloy1100
,
*End Part
**
**
** ASSEMBLY
**
*Assembly, name=Assembly
**
*Instance, name=plate, part=plate
*End Instance
**
*End Assembly
*Amplitude, name=piezo_0_DiracImpulse
             0.,              1.,           1e-08,              0.
*Amplitude, name=piezo_1_DiracImpulse
             0.,              1.,           1e-08,              0.
**
** MATERIALS
**
*Material, name=AluminumAlloy1100
*Density
2710.,
*Elastic
 6.9e+10, 0.33
** ----------------------------------------------------------------
**
** STEP: load_case_1_impulse_piezo_1
**
*Step, name=load_case_1_impulse_piezo_1, nlgeom=NO
*Dynamic, Explicit
, 0.003,, 1e-06
*Bulk Viscosity
0.06, 1.2
**
** LOADS
**
** Name: piezo_1_DiracImpulse   Type: Concentrated force
*Cload, amplitude=piezo_1_DiracImpulse
plate.transducer_02, 3, 1.
**
** OUTPUT REQUESTS
**
*Restart, write, number interval=1, time marks=NO
*Output, field, number interval=0
**
** HISTORY OUTPUT: history_transducer_0
**
*Output, history, frequency=1
*Node Output, nset=plate.transducer_01
U1, U2, U3
**
** HISTORY OUTPUT: history_transducer_1
**
*Node Output, nset=plate.transducer_02
U1, U2, U3
**
** HISTORY OUTPUT: H-Output-1
**
*Output, history, variable=PRESELECT
*End Step
